*Heading
** Job name: Job-3 Model name: Model-1
** Generated by: Abaqus/CAE 2021
*Preprint, echo=NO, model=NO, history=NO, contact=NO
**
** PARTS
**
*Part, name=Part-1
*Node
      1,          10.,          10.,          10.
      2,          10.,          9.5,          10.
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*Element, type=C3D8
   1,  442,  443,  464,  463,    1,    2,   23,   22
   2,  443,  444,  465,  464,    2,    3,   24,   23
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*Nset, nset=_PickedSet2, internal, generate
    1,  9261,     1
*Elset, elset=_PickedSet2, internal, generate
    1,  8000,     1
** Section: Section-1
*Solid Section, elset=_PickedSet2, material=Material-1
,
*End Part
**
**
** ASSEMBLY
**
*Assembly, name=Assembly
**
*Instance, name=Part-1-1, part=Part-1
*End Instance
**
*Nset, nset=_PickedSet5, internal, instance=Part-1-1
    1,    2,    3,    4,    5,    6
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*Elset, elset=_PickedSet5, internal, instance=Part-1-1
    1,    2,    3,    4,    5,    6
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*Nset, nset=_PickedSet8, internal, instance=Part-1-1, generate
 8821,  9261,     1
*Elset, elset=_PickedSet8, internal, instance=Part-1-1, generate
 7601,  8000,     1
*Nset, nset=_PickedSet9, internal, instance=Part-1-1, generate
    1,  9241,    21
*Elset, elset=_PickedSet9, internal, instance=Part-1-1, generate
    1,  7981,    20
*Nset, nset=_PickedSet10, internal, instance=Part-1-1
  421,  422,  423,  424,  425,  426
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*Elset, elset=_PickedSet10, internal, instance=Part-1-1
  381,  382,  383,  384,  385,  386
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*End Assembly
*Amplitude, name=Amp-1, time=TOTAL TIME
             0.,              0.,              1.,              1.,              3.,             -1.,              5.,              1.
**
** MATERIALS
**
*Material, name=Material-1
*Depvar
     14,
*User Material, constants=11
185000., 0.33,  82.,2800.,  25.,  58., 270.,   8.
  60., 151.,  24.
**
** BOUNDARY CONDITIONS
**
** Name: BC-2 Type: Displacement/Rotation
*Boundary
_PickedSet8, 1, 1
** Name: BC-3 Type: Displacement/Rotation
*Boundary
_PickedSet9, 2, 2
** Name: BC-4 Type: Displacement/Rotation
*Boundary
_PickedSet10, 3, 3
** ----------------------------------------------------------------
**
** STEP: Step-1
**
*Step, name=Step-1, nlgeom=NO, inc=100000000
*Static
5000., 200000., 1e-20, 10000.
**
** BOUNDARY CONDITIONS
**
** Name: BC-1 Type: Displacement/Rotation
*Boundary
_PickedSet5, 3, 3, 0.04
**
** OUTPUT REQUESTS
**
*Restart, write, frequency=0
**
** FIELD OUTPUT: F-Output-1
**
*Output, field, variable=PRESELECT
**
** HISTORY OUTPUT: H-Output-1
**
*Output, history, variable=PRESELECT
*End Step
