*Heading
** Job name: Job-1 Model name: Model-1
** Generated by: Abaqus/CAE 2021
*Preprint, echo=NO, model=NO, history=NO, contact=NO
**
** PARTS
**
*Part, name=Part-1
*Node
      1,           1.,           1.,           1.
      2,           1.,  0.899999976,           1.
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*Element, type=C3D8
   1,  122,  123,  134,  133,    1,    2,   13,   12
   2,  123,  124,  135,  134,    2,    3,   14,   13
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*Nset, nset=_PickedSet2, internal, generate
    1,  1331,     1
*Elset, elset=_PickedSet2, internal, generate
    1,  1000,     1
*Orientation, name=Ori-1
1., 0., 0., 0., 1., 0.
1, 0.
** Section: Section-1
*Solid Section, elset=_PickedSet2, orientation=Ori-1, material=Material-1
,
*End Part
**
**
** ASSEMBLY
**
*Assembly, name=Assembly
**
*Instance, name=Part-1-1, part=Part-1
*End Instance
**
*Node
      1,          0.5,          0.5,   1.10000002
*Nset, nset=Set-1
 1,
*Nset, nset=_PickedSet4, internal, instance=Part-1-1
  111,  112,  113,  114,  115,  116
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*Elset, elset=_PickedSet4, internal, instance=Part-1-1
   91,   92,   93,   94,   95,   96
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*Nset, nset=_PickedSet5, internal, instance=Part-1-1
    1,    2,    3,    4,    5,    6
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*Elset, elset=_PickedSet5, internal, instance=Part-1-1
   1,   2,   3,   4,   5,   6
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*Nset, nset=_PickedSet6, internal, instance=Part-1-1, generate
 1211,  1331,     1
*Elset, elset=_PickedSet6, internal, instance=Part-1-1, generate
  901,  1000,     1
*Nset, nset=_PickedSet7, internal, instance=Part-1-1, generate
   1,  121,    1
*Elset, elset=_PickedSet7, internal, instance=Part-1-1, generate
   1,  100,    1
*Nset, nset=_PickedSet11, internal
 1,
*Elset, elset=__PickedSurf10_S3, internal, instance=Part-1-1
   1,   2,   3,   4,   5,   6
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*Surface, type=ELEMENT, name=_PickedSurf10, internal
__PickedSurf10_S3, S3
** Constraint: Constraint-1
*Coupling, constraint name=Constraint-1, ref node=_PickedSet11, surface=_PickedSurf10
*Kinematic
3, 3
*End Assembly
**
** MATERIALS
**
*Material, name=Material-1
*Depvar
     92,
*User Material, constants=46
73000.,     0.42,      15.,      2.4,  1.5e-06,    9000.,     400.,      10.
 1.53e-08,    1e-43,      10.,      3.7,      28.,     177.,     -40.,      30.
      2.5,       5.,      1.1,      1.2,    0.666,    -0.28,    -0.38,    -0.82
      3.4,    0.699,    0.562,    0.666,   -0.401,   -0.265,   -0.297,     0.33
    0.666,    0.666,    0.666,       1.,   -0.333,   -0.333,   -0.333,    0.626
     0.88,    0.666,   -0.206,    -0.46,    -0.42,     2.75
**
** BOUNDARY CONDITIONS
**
** Name: BC-1 Type: Symmetry/Antisymmetry/Encastre
*Boundary
_PickedSet4, ZSYMM
** ----------------------------------------------------------------
**
** STEP: Step-1
**
*Step, name=Step-1, nlgeom=NO, inc=1000000000
*Static
0.01, 76., 1e-20, 0.02
**
** BOUNDARY CONDITIONS
**
** Name: BC-5 Type: Displacement/Rotation
*Boundary
Set-1, 3, 3, 0.05
**
** OUTPUT REQUESTS
**
*Restart, write, frequency=0
**
** FIELD OUTPUT: F-Output-1
**
*Output, field, frequency=40
*Node Output
U,
*Element Output, directions=YES
E, MISES, S, SDV
**
** HISTORY OUTPUT: H-Output-1
**
*Output, history, frequency=40
*Node Output, nset=Set-1
RF1, RF2, RF3, RM1, RM2, RM3, U1, U2
U3, UR1, UR2, UR3
*End Step
